# coding: utf8

import unittest
import numpy
import Sofa
import Sofa.Types
import SofaRuntime
from Sofa.PyTypes import RGBAColor


class NpArrayTestController(Sofa.Core.Controller):
    def __init__(self, *args, **kwargs):
        Sofa.Core.Controller.__init__(self, *args, **kwargs)

        self.addData(name="vector_Vec3_1entry",
                     type="vector<Vec3d>", value=[[1, 2, 3]])
        self.addData(name="vector_Vec3_3entries", type="vector<Vec3d>", value=[
            [1, 2, 3], [4, 5, 6], [7, 8, 9]])

        self.addData(name="vector_int_1entry", type="vector<int>", value=[1])
        self.addData(name="vector_int_3entries",
                     type="vector<int>", value=[1, 2, 3])

        self.addData(name="vector_scalar_1entry",
                     type="vector<double>", value=[1.0])
        self.addData(name="vector_scalar_3entries",
                     type="vector<double>", value=[1.0, 2.0, 3.0])

        self.addData(name="vector_text_1entry",
                     type="vector<string>", value=["v1"])
        self.addData(name="vector_text_3entries",
                     type="vector<string>", value=["v1", "v2", "v3"])

    def testLen(self, test):
        test.assertEqual(len(self.vector_Vec3_1entry), 1)
        test.assertEqual(len(self.vector_Vec3_3entries), 3)

        test.assertEqual(len(self.vector_int_1entry), 1)
        test.assertEqual(len(self.vector_int_3entries), 3)

        test.assertEqual(len(self.vector_scalar_1entry), 1)
        test.assertEqual(len(self.vector_scalar_3entries), 3)

        test.assertEqual(len(self.vector_text_1entry), 1)
        test.assertEqual(len(self.vector_text_3entries), 3)

    def testSize(self, test):
        test.assertEqual(self.vector_Vec3_1entry.size, 3)
        test.assertEqual(self.vector_Vec3_3entries.size, 9)

        test.assertEqual(self.vector_int_1entry.size, 1)
        test.assertEqual(self.vector_int_3entries.size, 3)

        test.assertEqual(self.vector_scalar_1entry.size, 1)
        test.assertEqual(self.vector_scalar_3entries.size, 3)

    def testShape(self, test):
        test.assertEqual(self.vector_Vec3_1entry.shape, (1, 3))
        test.assertEqual(self.vector_Vec3_3entries.shape, (3, 3))

        test.assertEqual(self.vector_int_1entry.shape, (1,))
        test.assertEqual(self.vector_int_3entries.shape, (3,))

        test.assertEqual(self.vector_scalar_1entry.shape, (1,))
        test.assertEqual(self.vector_scalar_3entries.shape, (3,))

    def testNDim(self, test):
        test.assertEqual(self.vector_Vec3_1entry.ndim, 2)
        test.assertEqual(self.vector_Vec3_3entries.ndim, 2)

        test.assertEqual(self.vector_int_1entry.ndim, 1)
        test.assertEqual(self.vector_int_3entries.ndim, 1)

        test.assertEqual(self.vector_scalar_1entry.ndim, 1)
        test.assertEqual(self.vector_scalar_3entries.ndim, 1)

    def testValue(self, test):
        test.assertEqual(str(self.vector_Vec3_1entry.array()),
                         str(numpy.array([[1.0, 2.0, 3.0]])))
        test.assertEqual(str(self.vector_Vec3_3entries.array()),
                         str(numpy.array([[1.0, 2.0, 3.0], [4.0, 5.0, 6.0], [7.0, 8.0, 9.0]])))

        test.assertEqual(str(self.vector_int_1entry.array()), str(numpy.array([1])))
        test.assertEqual(str(self.vector_int_3entries.array()), str(numpy.array([1, 2, 3])))

        test.assertEqual(str(self.vector_scalar_1entry.array()), str(numpy.array([1.0])))
        test.assertEqual(str(self.vector_scalar_3entries.array()),
                         str(numpy.array([1.0, 2.0, 3.0])))

        test.assertEqual(repr(self.vector_text_1entry), repr(["v1"]))
        test.assertEqual(repr(self.vector_text_3entries),
                         repr(["v1", "v2", "v3"]))

def create_scene(rootName="root"):
    root = Sofa.Core.Node(rootName)
    root.addObject("RequiredPlugin", pluginName="Sofa.Component.StateContainer")
    return root

class Test(unittest.TestCase):

    def test_getattr(self):
        root = create_scene("root")
        c = root.addObject("MechanicalObject", name="c")
        self.assertEqual(str(type(c.position)), "<class 'Sofa.Core.DataContainer'>")
        c.addData("d1", type="string", value="coucou")
        c.addData("d2", type="vector<Vec3d>", value=[[0,1,2],[3,4,5]])
        c.addData("d3", type="vector<string>", value=["coucou1","coucou2"])

        self.assertEqual(str(type(c.d1)), "<class 'Sofa.Core.DataString'>")
        self.assertEqual(str(type(c.d2)), "<class 'Sofa.Core.DataContainer'>")
        self.assertEqual(str(type(c.d3)), "<class 'Sofa.Core.DataVectorString'>")
        self.assertEqual(str(type(c.bbox)), "<class 'Sofa.Types.BoundingBox'>")

    def test_typeName(self):
        root = create_scene("rootNode")
        c = root.addObject("MechanicalObject", name="t", position=[
            [0, 0, 0], [1, 1, 1], [2, 2, 2]])
        self.assertEqual(c.position.typeName(), "vector<Vec3d>")
        self.assertEqual(c.showColor.typeName(), "RGBAColor")

    # @unittest.skip  # no reason needed
    def test_ValidDataAccess(self):
        root = create_scene("rootNode")
        c = root.addObject("MechanicalObject", name="t", position=[
            [0, 0, 0], [1, 1, 1], [2, 2, 2]])
        self.assertTrue(c.position is not None)

    # @unittest.skip  # no reason needed
    def test_InvalidDataAccess(self):
        root = create_scene("rootNode")
        self.assertRaises(AttributeError, getattr, root, "invalidData")

    # @unittest.skip  # no reason needed
    def test_DataAsArray2D(self):
        root = create_scene("rootNode")
        v = [[0, 0, 0], [1, 1, 1], [2, 2, 2]]
        c = root.addObject("MechanicalObject", name="t", position=v)
        self.assertEqual(len(c.position.value), 3)
        self.assertSequenceEqual(list(c.position.value[0]), v[0])
        self.assertSequenceEqual(list(c.position.value[1]), v[1])
        self.assertSequenceEqual(list(c.position.value[2]), v[2])

    # @unittest.skip  # no reason needed
    def test_DataArray2DSetFromList(self):
        v = [[0, 0, 0], [1, 1, 1], [2, 2, 2], [3, 3, 3]]
        root = create_scene("rootNode")
        c = root.addObject("MechanicalObject", name="t", position=v)
        c.position = [[1, 1, 1], [2, 2, 2], [3, 3, 3], [4, 4, 4]]
        numpy.testing.assert_array_equal(c.position.array(), [[1.0, 1.0, 1.0], [
            2.0, 2.0, 2.0], [3.0, 3.0, 3.0], [4.0, 4.0, 4.0]])

    # @unittest.skip  # no reason needed
    def test_DataArray2DResizeFromArray(self):
        v = [[0, 0, 0], [1, 1, 1], [2, 2, 2], [3, 3, 3]]
        root = create_scene("rootNode")
        c = root.addObject("MechanicalObject", name="t", position=v)
        zeros = numpy.zeros((100, 3), dtype=numpy.float64)
        c.position.value = zeros
        numpy.testing.assert_array_equal(c.position.array(), zeros)

    # @unittest.skip  # no reason needed
    def test_DataArray2DInvalidResizeFromArray(self):
        v = [[0, 0, 0], [1, 1, 1], [2, 2, 2], [3, 3, 3]]
        root = create_scene("rootNode")
        c = root.addObject("MechanicalObject", name="t", position=v)
        zeros = numpy.zeros((4, 100), dtype=numpy.float64)

        def d():
            c.position = zeros
        self.assertRaises(IndexError, d)

    # @unittest.skip  # no reason needed
    def test_DataArray2DSetFromArray(self):
        v = [[0, 0, 0], [1, 1, 1], [2, 2, 2], [3, 3, 3], [4, 4, 4]]
        root = create_scene("rootNode")
        c = root.addObject("MechanicalObject", name="t", position=v)

        zeros = numpy.zeros((500, 3), dtype=numpy.float64)
        c.position.value = zeros
        numpy.testing.assert_array_equal(c.position.array(), zeros)

        ones = numpy.ones((1000, 3), dtype=numpy.float32)
        c.position.value = ones
        numpy.testing.assert_array_equal(c.position.array(), ones)

        zeros = numpy.zeros((500, 3), dtype=numpy.float32)
        c.position.value = zeros
        numpy.testing.assert_array_equal(c.position.array(), zeros)

    @unittest.skip  # no reason needed
    def test_DataArray2DElementWiseOperation(self):
        root = create_scene("rootNode")
        m = [[1, 0, 0], [0, 1, 0], [0, 0, 1]]
        v = [[0, 0, 0], [1, 1, 1], [2, 2, 2], [3, 3, 3]]
        c = root.addObject("MechanicalObject", name="t", position=v)
        c.position.value *= c.position.value

    def test_UnknowAttribute(self):
        """ Access a non-existing attribute of a data field so this should trigger AttributeError"""
        root = create_scene("root")  # < Create a new node
        # < Create a new object
        c = root.addObject("MechanicalObject", name="t")
        p = c.position.value  # < Retrive its position

        # < Check that accessing an invalid data field rise an attribute error and nothing
        # < else.
        self.assertRaises(AttributeError, (lambda aa: aa.unvalid), p)

    # @unittest.skip  # no reason needed
    def test_DataArray2DOperation(self):
        root = create_scene("rootNode")
        v = numpy.array([[0, 0, 0], [1, 1, 1], [2, 2, 2], [3, 3, 3]])
        c = root.addObject("MechanicalObject", name="t", position=v.tolist())
        c2 = c.position.value * 2.0

        numpy.testing.assert_array_equal(c.position.array(), v)
        numpy.testing.assert_array_equal(c2, v*2.0)

        c2 = c.position.value + 2.0
        numpy.testing.assert_array_equal(c.position.array(), v)
        numpy.testing.assert_array_equal(c2, v+2.0)

    # @unittest.skip  # no reason needed
    def test_DataAsArray1D(self):
        root = create_scene("rootNode")
        v = [[0, 0, 0], [1, 1, 1], [2, 2, 2]]
        c = root.addObject("MechanicalObject", name="t",
                           position=v, showColor=[0.42, 0.1, 0.9, 1.0])
        self.assertEqual(len(c.showColor.value), 4)
        self.assertAlmostEqual(c.showColor.value[0], 0.42)

    # @unittest.skip  # no reason needed
    def test_DataWrapper1D(self):
        root = create_scene("rootNode")
        v = [[0, 0, 0], [1, 1, 1], [2, 2, 2]]
        root.addObject("MechanicalObject", name="obj", position=v)

        c = RGBAColor(root.obj.showColor)
        self.assertEqual(c.r(), 1.0)

        with root.obj.showColor.writeableArray(RGBAColor) as color:
            color[0] = 2.0

        self.assertEqual(color.r(), 2.0)

        def t(c):
            c[0] = 1.0
        self.assertRaises(ValueError, (lambda c: t(c)), color)

    def test_DataAsContainerNumpyArray_testIsDirtyOnDoubleAccess_(self):
        SofaRuntime.importPlugin("Sofa.Component.Topology.Container.Dynamic")

        root = create_scene("rootNode")

        root.addObject("PointSetTopologyContainer", points=[[0, 0, 0], [1, 0, 0]])
        modifier = root.addObject("PointSetTopologyModifier")
        mo = root.addObject("MechanicalObject")
        Sofa.Simulation.initRoot(root)

        modifier.addPoints(10, True)
        self.assertEqual(len(mo.position), 12)

        modifier.addPoints(10, True)
        self.assertEqual(len(mo.position), 22)

    def test_DataAsContainerNumpyArray_testIsDirtyOnDoubleWriteAccess_(self):
        root = create_scene("rootNode")

        root.addObject("PointSetTopologyContainer", points=[[0, 0, 0], [1, 0, 0]])
        modifier = root.addObject("PointSetTopologyModifier")
        mo = root.addObject("MechanicalObject")
        Sofa.Simulation.initRoot(root)

        modifier.addPoints(10, True)
        with mo.position.writeable() as w:
            self.assertEqual(len(w), 12)

        modifier.addPoints(10, True)
        with mo.position.writeable() as w:
            self.assertEqual(len(w), 22)

    def test_DataAsContainerNumpyArray_(self):
        root = create_scene("rootNode")
        v = numpy.array([[0, 0, 0], [1, 1, 1], [2, 2, 2], [3, 3, 3]])
        c = root.addObject("MechanicalObject", name="t", position=v.tolist())
        Sofa.Simulation.initRoot(root)

        numpy.testing.assert_array_equal(c.position.array(), v)

        with c.position.writeable() as wa:
            self.assertEqual(wa.shape, (4, 3))
            self.assertEqual(wa[0, 0], 0.0)
            self.assertEqual(wa[1, 1], 1.0)
            self.assertEqual(wa[2, 2], 2.0)

        numpy.testing.assert_array_equal(c.position.array(), v)

        with c.position.writeable() as wa:
            wa[0, 0] = 1.0

        assert c.position.array()[0, 0] == 1.0

    def test_DataAsContainerNumpyArrayRepeat(self):
        root = create_scene("rootNode")
        v = numpy.array([[0, 0, 0], [1, 1, 1], [2, 2, 2], [3, 3, 3]])
        c = root.addObject("MechanicalObject", name="t", position=v.tolist())

        with c.position.writeableArray() as wa:
            wa *= 2.0
            self.assertEqual(wa.shape, (4, 3))
            self.assertEqual(wa[0, 0], 0.0)
            self.assertEqual(wa[1, 1], 2.0)
            self.assertEqual(wa[2, 2], 4.0)
            numpy.testing.assert_array_equal(wa, v*2.0)

        # Checks that the data are correctly changed in the writeable block
        numpy.testing.assert_array_equal(c.position.array(), v*2.0)

        # Checks that trying to access wa object in write correctly raise
        # an error.
        def t(c):
            c[0, 0] = 1.0
        self.assertRaises(ValueError, (lambda c: t(c)), wa)

        # Checks that the previously defined blocks is correctly re-created.
        with c.position.writeableArray() as wa:
            wa *= 2.0
            self.assertEqual(wa.shape, (4, 3))
            self.assertEqual(wa[0, 0], 0.0)
            self.assertEqual(wa[1, 1], 4.0)
            self.assertEqual(wa[2, 2], 8.0)
            numpy.testing.assert_array_equal(wa, v*4.0)

    def test_linkpath(self):
        """Accessing the linkpath property should return a LinkPath object with a correct 'path'"""
        n = create_scene("rootNode")
        m = n. addObject("MechanicalObject", name="dofs")
        self.assertEqual(type(m.position.linkpath), Sofa.Core.LinkPath)
        self.assertEqual(str(m.position.linkpath), "@/dofs.position")

    def test_linkpath_in_add_object_compat(self):
        """Checks that passing a link path to the addObject function is still working as it was before sofa 21.12"""
        root = create_scene("root")
        root.addObject("MechanicalObject", name="dofs1", position=[[1.0,2.0,3.0]])
        root.addObject("MechanicalObject", name="dofs2", position=root.dofs1.position.linkpath)
        self.assertEqual(str(root.dofs2.position.getParent().linkpath), "@/dofs1.position")

    def test_linkpath_between_two_scenes(self):
        """Checks that passing a link path to the addObject function is still working as it was before sofa 21.12"""
        root1 = create_scene("root1")
        root1.addChild("child1")
        root2 = create_scene("root2")
        root2.addChild("child2")
        root1.child1.addObject("MechanicalObject", name="dofs1", position=[[1.0,2.0,3.0]])
        root2.child2.addObject("MechanicalObject", name="dofs2", position=root1.child1.dofs1.position.linkpath)
        self.assertEqual(str(root2.child2.dofs2.position.getParent().linkpath), "@/child1/dofs1.position")

    def test_set_value_from_string(self):
        n = create_scene("rootNode")
        n.gravity.value = [1.0, 2.0, 3.0]
        self.assertEqual(list(n.gravity.value), [1.0, 2.0, 3.0])
        n.gravity.value = "4.0 5.0 6.0"
        self.assertEqual(list(n.gravity.value), [4.0, 5.0, 6.0])

    def test_DataString(self):
        n = create_scene("rootNode")
        self.assertTrue(isinstance(n.name, Sofa.Core.DataString))
        self.assertEqual(n.name.value, "rootNode")
        self.assertEqual(len(n.name), 8)

    def test_DataAsContainerNumpyArray(self):
        n = create_scene("rootNode")
        c = n.addObject(NpArrayTestController(name="c"))

        c.testLen(self)
        c.testSize(self)
        c.testShape(self)
        c.testNDim(self)
        c.testValue(self)

    def test_name(self):
        root = create_scene("root")
        root.addData(name="aField", value=1.0 , help="help message",group="theDataGroup", type="float")
        data = root.getData("aField")
        self.assertEqual(data.getName(),"aField")
        data.setName("aNewField")
        self.assertEqual(data.getName(),"aNewField")

    def test_getValueString(self):
        root = create_scene("root")
        c = root.addObject("MechanicalObject", name="t", position=[[0,1,0]])
        self.assertEqual(c.position.getValueString(),"0 1 0")

    def test_getValueTypeString(self):
        root = create_scene("root")
        c = root.addObject("MechanicalObject", name="t", position=[[0,1,0]])
        self.assertEqual(c.position.getValueTypeString(),"vector<Vec3d>")

    def test_isRequired(self):
        root = create_scene("root")
        self.assertFalse(root.name.isRequired())

    def test_Persistent(self):
        root = create_scene("root")
        root.addData(name="aField", value=1.0 , help="help message",group="theDataGroup", type="float")
        data = root.getData("aField")
        self.assertTrue(data.isPersistent())
        data.setPersistent(False)
        self.assertFalse(data.isPersistent())

    def test_Parent(self):
        root = create_scene("root")
        root.addData(name="aField", value=1.0 , help="help message",group="theDataGroup", type="float")
        root.addData(name="aFieldParent", value=1.0 , help="help message",group="theDataGroup", type="float")
        data = root.getData("aField")
        dataParent = root.getData("aFieldParent")
        self.assertFalse(data.hasParent())
        data.setParent(dataParent)
        self.assertTrue(data.hasParent())
        self.assertEqual(data.getParent().getName(),"aFieldParent")

    def test_getLinkPath(self):
        root = create_scene("root")
        root.addData(name="aField", value=1.0 , help="help message",group="theDataGroup", type="float")
        root.addData(name="aFieldParent", value=1.0 , help="help message",group="theDataGroup", type="float")
        data = root.getData("aField")
        dataParent = root.getData("aFieldParent")
        data.setParent(dataParent)
        self.assertEqual(data.getLinkPath(), "@/.aField")
        self.assertEqual(dataParent.getLinkPath(),"@/.aFieldParent")

    def test_read(self):
        root = create_scene("root")
        root.addData(name="aField", value=1.0 , help="help message",group="theDataGroup", type="float")
        data = root.getData("aField")
        self.assertEqual(data.value,1.0)
        self.assertTrue(data.read("3.0"))
        self.assertEqual(data.value,3.0)
        self.assertFalse(data.read("test"))

    def test_Dirty(self):
        root = create_scene("root")
        root.addData(name="aField", value=1.0 , help="help message",group="theDataGroup", type="float")
        root.addData(name="aFieldParent", value=1.0 , help="help message",group="theDataGroup", type="float")
        data = root.getData("aField")
        dataParent = root.getData("aFieldParent")
        data.setParent(dataParent)
        dataParent.read("3.0")
        self.assertFalse(dataParent.isDirty())
        self.assertTrue(data.isDirty())
        data.updateIfDirty()
        self.assertFalse(data.isDirty())

    def test_readOnly(self):
        root = create_scene("root")
        root.addData(name="aField", value=1.0 , help="help message",group="theDataGroup", type="float")
        data = root.getData("aField")
        self.assertFalse(data.isReadOnly())
        data.setReadOnly(True)
        self.assertTrue(data.isReadOnly())

    def test_DownCast(self):
        root = create_scene('root')
        self.assertEqual(type(root.name), Sofa.Core.DataString)
        self.assertEqual(type(root.gravity), Sofa.Core.DataContainer)
        self.assertEqual(type(root.dt), Sofa.Core.Data)
